# -*- coding: utf-8 -*-
"""
    Cosserat class in SofaPython3.
"""


__authors__ = "Yinoussa"
__contact__ = "adagolodjo@protonmail.com"
__version__ = "1.0.0"
__copyright__ = "(c) 2021,Inria"
__date__ = "July, 20 2023"

from useful.header import addHeader
from useful.params import BeamPhysicsParameters, BeamGeometryParameters
from cosserat.cosseratObject import Cosserat

import os
from splib3.numerics.quat import Quat

path = f'{os.path.dirname(os.path.abspath(__file__))}/mesh/'

"""  @info
Comme tu l'aura compris notre prototype est composé d'une colonne centrale (fils de fer tressés avec une gaine)
 et de 13 disques en iglidur.

 -La colonne mesure 65.5 cm pour un diamètre de 6.2mm

# -Les disques ont un diamètres de 5.2cm, une épaisseur de 2mm et une masse de 6.35g
#
# -Les disques sur la colonne sont espacés d'environ 4.7cm
#
# -Concernant les trous des disques, il y en a 3 sortes :
#
# les trous intérieurs sont au nombre de 3, ont un diamètre de 2mm et sont placés à environ 6mm du centre
# les trous intermédiaires sont au nombre de 3, ont un diamètre de 2.5mm et sont placés à environ 2cm du centre
# les trous extérieurs sont au nombre de 12, ont un diamètre de 1mm et sont placés à environ 2.3cm du centre
# -Enfin concernant le routage des câbles :
#
# Le manipulateur est constitué de 3 sections, chaque section est composé de 3 fils (disposés à 120° les uns des autres)
# Les câbles sont routés de manière parallèle
# La première section (celle du haut) ainsi que la deuxième (intermédiaire) sont constituées de 4 disques et la
# troisième (celle du bas) de 5 disques
# Les câbles ne sont déployés que sur leur propre section. Par exemple, les câbles qui fonctionnent sur la section 3
# passent par les trous extérieurs sur cette section et par les trous intérieurs sur les sections 1 et 2.
# [@info] ================ Unit: N, cm, g, Pa  ================
"""

YM = 1.0e8
PR = 0.38
rayleighStiffness = 1.e-3  # Nope
firstOrder = 1
EI = 1.e2
# coeff = 1.

# beam parameters
length = 65.5  # in cm
Rb = 6.2e-1 / 2.  # beam radius in cm

# @todo use CableGeometryParameters & CableParameters in Cosserat class for both geometry and physics parameters
geoParams = BeamGeometryParameters(init_pos=[0., 0., 0.], beamLength=length,
                                    nbSectionS=5, nbFramesF=30, buildCollisionModel=0, beamMass=1.)
# inertialParams = CableParameters(youngModulus=YM, poissonRatio=PR, radius=Rb, density=7.850e3,
# maxDisplacement=0.3, nbSections=20)
nonLinearConfig = {'init_pos': [0., 0., 0.], 'tot_length': length, 'nbSectionS': 5,
                   'nbFramesF': 30, 'buildCollisionModel': 0, 'beamMass': 1.}
inertialParams = {'GI': 1.5708, 'GA': 3.1416e4,
                  'EI': 0.7854, 'EA': 3.1416e4, 'L': length, 'Rb': Rb}

isCollisionModel = 0


def createIntermediateNode(parent, rigidCentral=None, baseName="rigidState"):
    """ The intermediateRigid construction """
    if rigidCentral is None:
        rigidCentral = [3, 0., 0, 0, 0, 0, 1]
    q0 = Quat()
    q1 = Quat()
    q2 = Quat()

    interChildPos = [[0, 1.7, 1., q0[0], q0[1], q0[2], q0[3]],
                     [0, -1.7, 1., q1[0], q1[1], q1[2], q1[3]],
                     [0., 0., -2., q2[0], q2[1], q2[2], q2[3]]]
    intermediateRigid = parent.addChild('intermediateRigid')
    intermediateRigid.addObject('MechanicalObject', name=baseName, template='Rigid3d',
                                                      position=rigidCentral, showObject=True, showObjectScale=0.4)
    intermediateRigid.addObject('RestShapeSpringsForceField', name='rigid', stiffness=1.e1, template="Rigid3d",
                                angularStiffness=1.e1, external_points=0, points=0)
    """Create intermediate kids"""
    interRigidChild = intermediateRigid.addChild('interRigidChild')
    interRigidChild.addObject('MechanicalObject', name="interRigidChildMo", template='Rigid3d',
                              position=interChildPos, showObject=True, showObjectScale=0.4)
    interRigidChild.addObject('RigidMapping', name="interRigidMap")


    """ Add disk to the scene, actually this disk is only use for the visualisation """
    loadDisk(intermediateRigid)

    return intermediateRigid

def loadDisk(parentNode):
    #### MAPPING of the disks (here some torus) ####    ###########
    diskMapping = parentNode.addChild("diskMapping")
    diskMapping.addObject("MeshOBJLoader", name="diskLoader", filename=f'{path}disqueBlender2.obj')
    diskMapping.addObject("OglModel", name="Visual", src="@diskLoader", color="1.0 0.5 0.25 1.0")
    diskMapping.addObject('RigidMapping', name="diskMap")


def createRigidDisk(rootNode):
    diskSolverNode = rootNode.addChild('diskSolverNode')
    diskSolverNode.addObject('EulerImplicitSolver', firstOrder=0, rayleighStiffness=0.01, rayleighMass=0.)
    diskSolverNode.addObject('SparseLDLSolver', name='solver')

    for i in range(1, 14):
        """ Create the rigid disk nodes """
        createIntermediateNode(diskSolverNode, rigidCentral=[i*(length/13.), 0., 0, 0, 0, 0, 1], baseName=f"rigidState{i}")

    # """ The intermediateRigid construction """
    # intermediateRigid = createIntermediateNode(diskSolverNode)


def createScene(rootNode):
    addHeader(rootNode)
    rootNode.gravity = [0., -9.81, 0.]
    stemNode = rootNode.addChild('stemNode')
    stemNode.addChild(
        Cosserat(parent=stemNode, cosseratGeometry=nonLinearConfig, inertialParams=inertialParams, radius=Rb,
                 useCollisionModel=isCollisionModel, name="cosserat", youngModulus=YM, poissonRatio=PR,
                 rayleighStiffness=rayleighStiffness))

    # create the rigid disk node
    createRigidDisk(rootNode)
