# -*- coding: utf-8 -*-
"""
    Create the scene with the
    Units: mm, kg, s.
"""

__authors__ = ("Yinoussa:Younes")
__contact__ = ("adagolodjo@protonmail.com")
__version__ = "1.0.0"
__copyright__ = "(c) 2021, Inria"
__date__ = "Juin 3 2021"

import Sofa
import os
import numpy as np

#constants
GRAVITY = 9810
TOT_MASS = 0.1
YOUNG_MODULUS=7e4
DENSITY = 0.2

TempPath = "/home/stefan/Repos/Code/sofa/plugins/SoftRobots.Inverse/docs/examples/component/constraint/BendLabsEffector/Temp/"
class OrientationSweepController(Sofa.Core.Controller):

    def __init__(self, *args, **kwargs):
        Sofa.Core.Controller.__init__(self, *args, **kwargs)

        self.RootNode = kwargs["RootNode"]
        self.RateAngularDeformMO = kwargs["RateAngularDeformMO"]

        self.LiveAngleDataPath = TempPath + "AngleData.txt"
        self.Data = np.array([])
        self.LastData = self.Data

    def onAnimateBeginEvent(self, dt):


        try:
            self.Data = np.loadtxt(self.LiveAngleDataPath)
        except Exception as e:
            print("Warning: couldn't read angles from file")
            return

        if self.Data.shape[0] == 0:
            return

        tot_length = 100.0
        alpha = np.deg2rad(self.Data[1])/(tot_length) # Actually, the sensor (or the arduino lib) doesn't follow our convention of the order of angles (first angle is in xz plane, second in yz plane)
        beta = np.deg2rad(self.Data[0])/(tot_length)


        #print("value: " + str(self.RateAngularDeformMO.rest_position.value))
        #CurrentRestPosition = self.RateAngularDeformMO.rest_position.value
#        CurrentRestPosition[0][1] = alpha
#        CurrentRestPosition[0][2] = beta
        self.RateAngularDeformMO.rest_position = [[0, alpha, beta]]

        print("setting alpha to: " + str(alpha))
        print("setting beta to: " + str(beta))

def createScene(rootNode):

    rootNode.addObject('RequiredPlugin', name='SoftRobots')
    #rootNode.addObject('RequiredPlugin', name='BeamAdapter')
    rootNode.addObject('RequiredPlugin', name='SofaPython3')
    rootNode.addObject('RequiredPlugin', name='SofaSparseSolver')
    rootNode.addObject('RequiredPlugin', name='SofaOpenglVisual')
    rootNode.addObject('RequiredPlugin', name='SofaConstraint')
    rootNode.addObject('RequiredPlugin', name='SofaLoader')
    rootNode.addObject('RequiredPlugin', name='SofaImplicitOdeSolver')
    rootNode.addObject('RequiredPlugin', name='SofaMeshCollision')
    rootNode.addObject('RequiredPlugin', name='SofaRigid')
    rootNode.addObject('RequiredPlugin', name='CosseratPlugin')
    rootNode.addObject('RequiredPlugin', name='SofaDeformable')
    rootNode.addObject('RequiredPlugin', name='SofaGeneralLinearSolver')
    rootNode.addObject('RequiredPlugin', name='SofaGeneralRigid')

    rootNode.addObject('VisualStyle', displayFlags='showVisualModels showBehaviorModels showCollisionModels hideBoundingCollisionModels showForceFields hideInteractionForceFields hideWireframe')
    rootNode.findData('dt').value=0.3
    rootNode.findData('gravity').value= [0., 0., -GRAVITY]

    rootNode.addObject('FreeMotionAnimationLoop')
    rootNode.addObject('GenericConstraintSolver', tolerance=1e-6, maxIterations=1000)


    #Define: the total lenght of the beam
    tot_length = 100.0

    #Define: the number of section, the total lenght and the lenght of each beam.
    nbSectionS = 1
    lengthS = tot_length / nbSectionS

    #Define: the number of frame and the lenght beetween each frame.
    nbFramesF = 20
    lengthF = tot_length /nbFramesF

    points = []
    position = []
    lines = []

    position3D = []
    for i in range(nbFramesF):
        sol = i * lengthF
        points.append(i)
        position.append([sol, 0, 0, 0, 0, 0, 1])
        position3D.append([sol, 0, 0])
        if i!= nbFramesF-1:
            lines+= [i, i+1]
    print("=============> position : ", position)

    ############################################################################
    ############################################################################
    ###########                       COSSERAT                       ###########
    ############################################################################
    ############################################################################

    #################################
    ##           RigidBase         ##
    #################################
    cableNode = rootNode.addChild('cableNode')
    cableNode.addObject('EulerImplicitSolver', rayleighStiffness="1.2", rayleighMass='1.1')
    cableNode.addObject('SparseLDLSolver', name='solver')
    cableNode.addObject('GenericConstraintCorrection')

    rigidBaseNode= cableNode.addChild('rigidBase')
    RigidBaseMO = rigidBaseNode.addObject('MechanicalObject', template='Rigid3d',
                                             name="RigidBaseMO", position= [0.,0.,0., 0,0,0,1], showObject=1,
                                             showObjectScale=2.)
    rigidBaseNode.addObject('RestShapeSpringsForceField', name='spring', stiffness="5.e8", angularStiffness="5.e8",
                               external_points="0", mstate="@RigidBaseMO", points="0", template="Rigid3d")

    #################################
    ## Rate of angular Deformation ##
    #################################

    #Define: the lenght of each beam in a list, the positions of each beam

    positionS = []
    longeurS = []
    sum = 0.
    curv_abs_inputS = []
    curv_abs_inputS.append(0.0)
    for i in range(nbSectionS):
        positionS.append([0, 0, 0])
        longeurS.append((((i+1)*lengthS) - i*lengthS))
        sum += longeurS[i]
        curv_abs_inputS.append(sum)

    curv_abs_inputS[nbSectionS] = tot_length


    """ Define: angular rate which is the torsion(x) and bending (y, z) of each section """

    #val = 3.14/(2*tot_length)
    val = 0
    rateAngularDeformNode = cableNode.addChild('rateAngularDeform')
    rateAngularDeformMO = rateAngularDeformNode.addObject('MechanicalObject',
                                    template='Vec3d', name='rateAngularDeformMO',
                                    position=positionS, showIndices=0, rest_position=[0.0, 0, val])
    BeamHookeLawForce = rateAngularDeformNode.addObject('BeamHookeLawForceField',
                                    crossSectionShape='circular', length=longeurS,
                                    radius=90., youngModulus=5e6)
    rateAngularDeformNode.addObject('RestShapeSpringsForceField', name='spring', stiffness="1.e20",
                               external_points="0", mstate="@rateAngularDeformMO", points="0", template="Vec3d")


    #################################
    ##             Frame           ##
    #################################
    #Define: local frames related to each section and parameters curv_abs_outputF
    framesF = []
    curv_abs_outputF = []
    for i in range(nbFramesF):
        sol = i * lengthF
        framesF.append([sol, 0, 0,  0, 0, 0, 1])
        curv_abs_outputF.append(sol)

    framesF.append([tot_length, 0, 0, 0, 0, 0, 1])
    curv_abs_outputF.append(tot_length)
    print("=============> framesF : ", framesF)

    #The node of the frame needs to inherit from rigidBaseMO and rateAngularDeform
    mappedFrameNode = rigidBaseNode.addChild('MappedFrames')
    rateAngularDeformNode.addChild(mappedFrameNode)

    framesMO = mappedFrameNode.addObject('MechanicalObject', template='Rigid3d',
                                                name="FramesMO", position=framesF,
                                            showObject=1, showObjectScale=1)

    # The mapping has two inputs: RigidBaseMO and rateAngularDeformMO
    #                 one output: FramesMO
    inputMO = rateAngularDeformMO.getLinkPath()
    inputMO_rigid = RigidBaseMO.getLinkPath()
    outputMO = framesMO.getLinkPath()

    mappedFrameNode.addObject('DiscretCosseratMapping', curv_abs_input= curv_abs_inputS,
                                 curv_abs_output=curv_abs_outputF, input1=inputMO, input2=inputMO_rigid,
                                 output=outputMO, debug=0)

    ############################################################################
    ############################################################################
    ###########                        MAPPING                       ###########
    ############################################################################
    ############################################################################

    cosCollisionPoints = mappedFrameNode.addChild('cosCollisionPoints')
    cosColliMeca = cosCollisionPoints.addObject('MechanicalObject', name="cosColliPoins", template="Vec3d",
                                                position = position3D)
    cosCollisionPoints.addObject('SkinningMapping', nbRef='2')

    rootNode.addObject(OrientationSweepController(name="OrientationSweeController", RootNode=rootNode, RateAngularDeformMO=rateAngularDeformMO))

    return rootNode
