# -*- coding: utf-8 -*-

import Sofa
import SofaPython
from math import sin,cos, sqrt, pi
import os
path = os.path.dirname(os.path.abspath(__file__))+'/mesh/'


class Animation(Sofa.PythonScriptController):

    def __init__(self, rigidBaseNode, rateAngularDeformNode):
        self.rigidBaseNode = rigidBaseNode
        self.rateAngularDeformNode = rateAngularDeformNode

        self.rate = 0.2;
        self.angularRate=0.0;

        return;


    def initGraph(self, nodeRigid):
        self.rigidBaseMO = self.rigidBaseNode.getObject('RigidBaseMO')
        self.rateAngularDeformMO = self.rateAngularDeformNode.getObject('rateAngularDeformMO')


    def onKeyPressed(self, c):

        if ord(c)==19: # up
            pos = self.rigidBaseMO.findData('rest_position').value;
            pos[0][1] += self.rate
            self.rigidBaseMO.findData('rest_position').value = pos
            print("=======> Position :",pos)

            posA = self.rateAngularDeformMO.findData('position').value;
            for i in range(len(posA)):
                posA[i][1] += self.angularRate
            self.rateAngularDeformMO.findData('position').value = posA


        if ord(c)==21: # down
            pos = self.rigidBaseMO.findData('rest_position').value;
            pos[0][0] -= self.rate
            self.rigidBaseMO.findData('rest_position').value = pos
            # print("=======> Position :",pos)

            posA = self.rateAngularDeformMO.findData('position').value;
            for i in range(len(posA)):
                posA[i][1] -= self.angularRate
            self.rateAngularDeformMO.findData('position').value = posA


        if ord(c)==18: # left
            pos = self.rigidBaseMO.findData('position').value;
            pos[0][2] -= self.rate
            self.rigidBaseMO.findData('position').value = pos
            print("=======> Position :",pos)

            posA = self.rateAngularDeformMO.findData('position').value;
            for i in range(len(posA)):
                posA[i][2] -= self.angularRate
            self.rateAngularDeformMO.findData('position').value = posA

        if ord(c)==20: # right
            pos = self.rigidBaseMO.findData('position').value;
            pos[0][2] += self.rate
            self.rigidBaseMO.findData('position').value = pos
            print("=======> Position :",pos)

            posA = self.rateAngularDeformMO.findData('position').value;
            for i in range(len(posA)):
                posA[i][2] += self.angularRate
            self.rateAngularDeformMO.findData('position').value = posA


def createScene(rootNode):
                rootNode.createObject('RequiredPlugin', pluginName='SoftRobots SofaPython SofaSparseSolver SofaPreconditioner SofaOpenglVisual CosseratPlugin BeamAdapter')
                rootNode.createObject('VisualStyle', displayFlags='showVisualModels hideBehaviorModels showCollisionModels hideBoundingCollisionModels hideForceFields showInteractionForceFields showWireframe')

                rootNode.createObject('FreeMotionAnimationLoop')
                rootNode.createObject('GenericConstraintSolver', tolerance="1e-5", maxIterations="100", printLog="1")
                rootNode.gravity = "0 -9810 0"
                rootNode.dt="0.01"
                rootNode.createObject('BackgroundSetting', color='0 0.168627 0.211765')
                rootNode.createObject('OglSceneFrame', style="Arrows", alignment="TopRight")


                cableNode = rootNode.createChild('cableNode')
                cableNode.createObject('EulerImplicitSolver', firstOrder="0", rayleighStiffness="1.0", rayleighMass='0.1')
                # cableNode.createObject('PCGLinearSolver', preconditioners='solver', tolerance="1e-15")
                # cableNode.createObject('SparseLDLSolver', name='solver')
                cableNode.createObject('SparseLUSolver', name='solver')
                #rootNode.createObject('SparseLUSolver', name='solver', tolerance='1e-5',  threshold='1e-5')
                cableNode.createObject('GenericConstraintCorrection')

                ###############hresho
                ## RigidBase
                ###############
                rigidBaseNode= cableNode.createChild('rigidBase')
                RigidBaseMO = rigidBaseNode.createObject('MechanicalObject', template='Rigid3d', name="RigidBaseMO", position="0 0 0  0 0 0 1", showObject='1', showObjectScale='0.1' )
                rigidBaseNode.createObject('RestShapeSpringsForceField', name='spring', stiffness="50000", angularStiffness="50000", external_points="0", mstate="@RigidBaseMO", points="0", template="Rigid3d"  )


                ###############
                ## Rate of angular Deformation  (2 sections)
                ###############
                position=["0 0 0 " + "0 0 0 " + "0 0 0 " + "0 0 0 " + "0 0 0 " + "0 0 0 " ]
                longeur = '15 15 15 15 6 15' # beams size
                rateAngularDeformNode = cableNode.createChild('rateAngularDeform')
                rateAngularDeformMO = rateAngularDeformNode.createObject('MechanicalObject', template='Vec3d', name='rateAngularDeformMO', position=position)
                BeamHookeLawForce = rateAngularDeformNode.createObject('BeamHookeLawForceField', crossSectionShape='circular', length=longeur, radius='0.5', youngModulus='5e6')

                #############@
                ### Animation (to move the dofs)
                ##############
                anim = Animation(rigidBaseNode,rateAngularDeformNode);

                ##############
                ## Frames
                ##############
                # frames=[ "1.5 12.5 7.5  0 0 0 1 10.0 12.5 7.5  0 0 0 1 15.0 12.5 7.5  0 0 0 1  20.0 12.5 7.5  0 0 0 1" +
                #                 " 30.0 12.5 7.5  0 0 0 1 45.0 12.5 7.5  0 0 0 1 55.0 12.5 7.5  0 0 0 1 60.0 12.5 7.5  0 0 0 1"+
                #                 " 75.0 12.5 7.5  0 0 0 1 81.0 12.5 7.5  0 0 0 1"]
                frames=[ "1.5 0 0  0 0 0 1 10.0 0 0  0 0 0 1 15.0 0 0  0 0 0 1  20.0 0 0  0 0 0 1" +
                                " 30.0 0 0  0 0 0 1 45.0 0 0  0 0 0 1 55.0 0 0  0 0 0 1 60.0 0 0  0 0 0 1"+
                                " 75.0 0 0  0 0 0 1 81.0 0 0  0 0 0 1"]
                # the node of the frame needs to inherit from rigidBaseMO and rateAngularDeform
                mappedFrameNode = rigidBaseNode.createChild('MappedFrames')
                rateAngularDeformNode.addChild(mappedFrameNode)
                framesMO = mappedFrameNode.createObject('MechanicalObject', template='Rigid3d', name="FramesMO", position=frames, showObject='1', showObjectScale='1' )

                # The mapping has two inputs: RigidBaseMO and rateAngularDeformMO
                #                 one output: FramesMO
                inputMO = rateAngularDeformMO.getLinkPath()
                inputMO_rigid = RigidBaseMO.getLinkPath()
                outputMO = framesMO.getLinkPath()

                curv_abs_input='0 15 30 45 60 66 81'
                curv_abs_output='1.5 10 15 20 30 45 55 60 75 81'
                mappedFrameNode.createObject('DiscretCosseratMapping', curv_abs_input=curv_abs_input, curv_abs_output=curv_abs_output, input1=inputMO, input2=inputMO_rigid,output=outputMO, debug='0' )

                # return rootNode
                ##########################################
                # Cable                                  #
                ##########################################
                # cable_position=[
                #         " 0.0 12.5 7.5 " + "15 12.5 7.5 " + "30 12.5 7.5 " +
                #         " 45 12.5 7.5 " + "60 12.5 7.5 " +
                #         " 66 12.5 7.5 " + "81 12.5 7.5 "]
                cable_position=[
                        " 0.0 0 0 15 0 0 30 0 0 45 0 0 60 0 0 66 0 0 " + "81 0 0 "]
                #  This create a new node in the scene. This node is appended to the finger's node.
                cable = mappedFrameNode.createChild('cable')

                # This create a MechanicalObject, a componant holding the degree of freedom of our
                # mechanical modelling. In the case of a cable it is a set of positions specifying
                # the points where the cable is passing by.
                cable.createObject('MechanicalObject', name="cablePos", position=cable_position, template="", showObject="1", showIndices="1")
                cable.createObject('LineCollisionModel', name="lines")
                cable.createObject('PointCollisionModel', name="points")

                # Create a CableConstraint object with a name.
                # the indices are referring to the MechanicalObject's positions.
                # The last indice is where the pullPoint is connected.
                # cable.createObject('CableConstraint', name="aCableActuator",indices="0 1 2 3 4 5 6", template='Vec3d',
                #                         pullPoint="-10.0 0 0",
                #                         #hasPullPoint="0",
                #                         valueType='displacement',
                #                         maxPositiveDisp='10.0',
                #                         maxDispVariation="0.1",
                #                         minForce=-0.00001,
                #                         #value='3.0'
                #                         )

                # This create a BarycentricMapping. A BarycentricMapping is a key element as it will create a bi-directional link
                # between the cable's DoFs and the finger's ones so that movements of the cable's DoFs will be mapped
                # to the finger and vice-versa;
                cable.createObject('SkinningMapping', nbRef='1',  mapForces='false', mapMasses='false')

                # This create a PythonScriptController that permits to programatically implement new behavior
                # or interactions using the Python programming langage. The controller is referring to a
                # file named "controller.py".
                # cable.createObject('PythonScriptController', filename="controller/FingerController.py", classname="controller")


                # return rootNode

                ##########################################
                # FEM Model                              #
                ##########################################
                finger = rootNode.createChild('finger')
                finger.createObject('EulerImplicitSolver', name='odesolver', firstOrder='0', rayleighMass="0.1", rayleighStiffness="0.1")
                finger.createObject('SparseLDLSolver', name='preconditioner')

		        # Add a componant to load a VTK tetrahedral mesh and expose the resulting topology in the scene .
                finger.createObject('MeshVTKLoader', name='loader', filename=path+'finger.vtk', translation="-17.5 -12.5 7.5", rotation="0 180 0")
                finger.createObject('TetrahedronSetTopologyContainer', src='@loader', name='container')
                finger.createObject('TetrahedronSetTopologyModifier')
                finger.createObject('TetrahedronSetTopologyAlgorithms', template='Vec3d')
                finger.createObject('TetrahedronSetGeometryAlgorithms', template='Vec3d')

                # Create a mechanicaobject component to stores the DoFs of the model
                finger.createObject('MechanicalObject', name='tetras', template='Vec3d', showIndices='false', showIndicesScale='4e-5', rx='0', dz='0')

                # Gives a mass to the model
                finger.createObject('UniformMass', totalMass='0.075')

                # Add a TetrahedronFEMForceField componant which implement an elastic material model solved using the Finite Element Method on
                # tetrahedrons.
                finger.createObject('TetrahedronFEMForceField', template='Vec3d', name='FEM', method='large', poissonRatio='0.45',  youngModulus='600')

                # To facilitate the selection of DoFs, SOFA has a concept called ROI (Region of Interest).
		        # The idea is that ROI component "select" all DoFS that are enclosed by their "region".
                # We use ROI here to select a group of finger's DoFs that will be constrained to stay
                # at a fixed position.
                # You can either use "BoxROI"...
                finger.createObject('BoxROI', name='ROI1', box='-18 -15 -8 2 -3 8', drawBoxes='true')
                # Or "SphereROI"...
                #finger.createObject('SphereROI', name='ROI', centers='0 0 0', radii='5')

                # RestShapeSpringsForceField is one way in Sofa to implement fixed point constraint.
                # Here the constraints are applied to the DoFs selected by the previously defined BoxROI
                finger.createObject('RestShapeSpringsForceField', points='@ROI1.indices', stiffness='1e12')

                # It is also possible to simply set by hand the indices of the points you want to fix.
                #finger.createObject('RestShapeSpringsForceField', points='0 1 2 11 55', stiffness='1e12')
                finger.createObject('LinearSolverConstraintCorrection')

                ##########################################
                # Cable points                           #
                ##########################################
                # Mappe points inside the meca, this points will be use for the bilateral mapping
                points = finger.createChild('points')
                points.createObject('MechanicalObject', name="pointsInFEM" ,position=cable_position)
                points.createObject('BarycentricMapping')

                ##########################################
                # Visualization                          #
                ##########################################
                # In Sofa, visualization is handled by adding a rendering model.
                # Create an empty child node to store this rendering model.
                fingerVisu = finger.createChild('visu')

                # Add to this empty node a rendering model made of triangles and loaded from an stl file.
                fingerVisu.createObject('MeshSTLLoader', filename=path+"finger.stl", name="loader", translation="-17.5 -12.5 7.5",rotation="0 180 0")
                fingerVisu.createObject('OglModel', src="@loader", template='ExtVec3f', color="0.0 0.7 0.7")

                # Add a BarycentricMapping to deform the rendering model in a way that follow the ones of the parent mechanical model.
                fingerVisu.createObject('BarycentricMapping')

                rootNode.createObject('BilateralInteractionConstraint', template='Vec3d', object2='@cableNode/rigidBase/MappedFrames/cable/cablePos', object1='@finger/points/pointsInFEM', first_point='6', second_point='6')

                # rootNode.createObject('SlidingConstraint', name="constraint2", object1="@finger/points/pointsInFEM", object2="@cableNode/rigidBase/MappedFrames/cable/cablePos", sliding_point="0 1 2", axis_1="0", axis_2="2")
                # rootNode.createObject('SlidingConstraint', name="constraint2", object1="@finger/points/pointsInFEM", object2="@cableNode/rigidBase/MappedFrames/cable/cablePos", sliding_point="3 4", axis_1="2", axis_2="4")
                # rootNode.createObject('SlidingConstraint', name="constraint2", object1="@finger/points/pointsInFEM", object2="@cableNode/rigidBase/MappedFrames/cable/cablePos", sliding_point="5 6", axis_1="4", axis_2="6")

                # rootNode.createObject('CosseratSlidingConstraint', name="constraint2", object1="@finger/points/pointsInFEM", object2="@cableNode/rigidBase/MappedFrames/cable/cablePos", sliding_point="0 1", axis_1="0", axis_2="2")
                rootNode.createObject('SlidingConstraint', name="constraint2", object1="@finger/points/pointsInFEM", object2="@cableNode/rigidBase/MappedFrames/cable/cablePos", sliding_point="0", axis_1="0", axis_2="2")
                rootNode.createObject('SlidingConstraint', name="constraint2", object1="@finger/points/pointsInFEM", object2="@cableNode/rigidBase/MappedFrames/cable/cablePos", sliding_point="1", axis_1="1", axis_2="3")
                rootNode.createObject('SlidingConstraint', name="constraint2", object1="@finger/points/pointsInFEM", object2="@cableNode/rigidBase/MappedFrames/cable/cablePos", sliding_point="2", axis_1="2", axis_2="4")
                rootNode.createObject('SlidingConstraint', name="constraint2", object1="@finger/points/pointsInFEM", object2="@cableNode/rigidBase/MappedFrames/cable/cablePos", sliding_point="3", axis_1="3", axis_2="5")
                rootNode.createObject('SlidingConstraint', name="constraint2", object1="@finger/points/pointsInFEM", object2="@cableNode/rigidBase/MappedFrames/cable/cablePos", sliding_point="4", axis_1="4", axis_2="6")
                rootNode.createObject('SlidingConstraint', name="constraint2", object1="@finger/points/pointsInFEM", object2="@cableNode/rigidBase/MappedFrames/cable/cablePos", sliding_point="5", axis_1="4", axis_2="6")
                # rootNode.createObject('SlidingConstraint', name="constraint2", object1="@finger/points/pointsInFEM", object2="@cableNode/rigidBase/MappedFrames/cable/cablePos", sliding_point="2", axis_1="2", axis_2="3")
                # rootNode.createObject('SlidingConstraint', name="constraint2", object1="@finger/points/pointsInFEM", object2="@cableNode/rigidBase/MappedFrames/cable/cablePos", sliding_point="3 4", axis_1="3", axis_2="4")
                # rootNode.createObject('SlidingConstraint', name="constraint2", object1="@finger/points/pointsInFEM", object2="@cableNode/rigidBase/MappedFrames/cable/cablePos", sliding_point="5 6", axis_1="4", axis_2="6")


                # rootNode.createObject('SlidingConstraint', name="constraint2", object1="@finger/points/pointsInFEM", object2="@cableNode/rigidBase/MappedFrames/cable/cablePos", sliding_point="0 1 2", axis_1="0", axis_2="2")
                # rootNode.createObject('SlidingConstraint', name="constraint2", object1="@finger/points/pointsInFEM", object2="@cableNode/rigidBase/MappedFrames/cable/cablePos", sliding_point="0 1 2 3 4 5 6", axis_1="3", axis_2="4")
                # rootNode.createObject('SlidingConstraint', name="constraint2", object1="@finger/points/pointsInFEM", object2="@cableNode/rigidBase/MappedFrames/cable/cablePos", sliding_point="0 1 2 3 4 5 6", axis_1="4", axis_2="5")
                # rootNode.createObject('SlidingConstraint', name="constraint2", object1="@finger/points/pointsInFEM", object2="@cableNode/rigidBase/MappedFrames/cable/cablePos", sliding_point="0 1 2 3 4 5 6", axis_1="5", axis_2="6")

                return rootNode
