# -*- coding: utf-8 -*-
"""
Tutorial 05: Constraints and Boundary Conditions
================================================

This tutorial demonstrates how to apply constraints to a Cosserat beam.
We will create a simple "bridge" by fixing both ends of the beam,
showing how it deforms under gravity.

Key concepts:
- Applying constraints to specific degrees of freedom.
- Using `FixedConstraint` to lock a point in space.
"""

import os
import sys

# Add the python package to the path
sys.path.insert(0, os.path.join(os.path.dirname(__file__), "..", "..", "..", "python"))

from cosserat import BeamGeometryParameters, CosseratGeometry

from introduction_and_setup import (_add_cosserat_frame_v2, _add_cosserat_state_v2,
                                    _add_rigid_base, add_mini_header, stiffness_param)

v_damping_param: float = 0.4  # Damping parameter for dynamics
stiffness_param: float = 1e6  # Stiffness
beam_mass = 300.
beam_radius = 1.


def createScene(root_node):
    """Create a Cosserat beam scene with constraints."""
    # Configure scene with time integration
    add_mini_header(root_node)
    root_node.addObject('RequiredPlugin', pluginName='Sofa.Component.Constraint.Projective') # Needed to use components [FixedProjectiveConstraint]
    root_node.addObject('RequiredPlugin', pluginName='Sofa.Component.LinearSolver.Direct') # Needed to use components [SparseLDLSolver]
    root_node.addObject('RequiredPlugin', pluginName='Sofa.Component.ODESolver.Backward') # Needed to use components [EulerImplicitSolver]

    # Add gravity
    root_node.gravity = [0, -9.81, 0]

    # Configure time integration and solver
    solver_node = root_node.addChild("solver")
    solver_node.addObject(
        "EulerImplicitSolver",
        rayleighStiffness="0.0",
        rayleighMass="0.0",
        vdamping=v_damping_param,
    )
    solver_node.addObject("SparseLDLSolver", name="solver", template="CompressedRowSparseMatrixd")

    # Define beam geometry
    beam_geometry_params = BeamGeometryParameters(
        beam_length=20.0,
        nb_section=40,
        nb_frames=40,
    )
    beam_geometry = CosseratGeometry(beam_geometry_params)

    # Create the beam nodes
    base_node = _add_rigid_base(solver_node)
    bending_node = _add_cosserat_state_v2(solver_node, beam_geometry)
    frame_node = base_node.addChild("frame_node")
    bending_node.addChild(frame_node)

    frames_mo = frame_node.addObject(
        "MechanicalObject",
        template="Rigid3d",
        name="FramesMO",
        position=beam_geometry.frames,  # Use geometry data
        showIndices=1,
        showObject=1,
        showObjectScale=0.8,
    )

    frame_node.addObject("UniformMass", totalMass=beam_mass)

    # --- CONSTRAINT ---
    # Fix the tip of the beam to create a bridge
    tip_frame_index = beam_geometry.get_number_of_frames()

    frame_node.addObject("RestShapeSpringsForceField",
        name="fixed_end",
        stiffness=stiffness_param,
        angularStiffness=stiffness_param,
        points=tip_frame_index,
        mstate="@FramesMO",
        template="Rigid3d")

    frame_node.addObject(
        "Strain2FramesCosseratMapping",
        curv_abs_input=beam_geometry.curv_abs_sections,  # Use geometry data
        curv_abs_output=beam_geometry.curv_abs_frames,  # Use geometry data
        name="cosseratMapping",
        input1=bending_node.cosserat_state.getLinkPath(),
        input2=base_node.cosserat_base_mo.getLinkPath(),
        output=frames_mo.getLinkPath(),
        debug=0,
        radius=beam_radius,
    )

    print("✨ Created a beam bridge by fixing both ends.")
    print(f"   - Tip frame index constrained: {tip_frame_index}")

    return root_node
